# LAMMPS input script
boundary p p p
units       real
atom_style  atomic
atom_modify map array sort 0 0
read_data   data.in
pair_style  tersoff
pair_coeff  * * WT_ML-BOP.tersoff WT

# ----- Variables -----
variable seed equal 87171
variable T equal 280.0000000000
variable P equal 0.986923 # 1 bar

# ----- Initialize -----
neighbor 2.0 nsq
neigh_modify delay 0 every 1 check yes
timestep 5 # 5 fs   # Fix timestep here

# ----- Log file output -----
thermo       10000
thermo_style    custom  time temp press pe ke lx ly lz density vol
thermo_modify line multi norm yes flush yes format float %.6f

# ----- equilibruate --------
fix 1 all npt temp ${T} ${T} 100 iso ${P} ${P} 1000
run 10000 # 1 ns
reset_timestep 0
unfix 1  # Remove the fix ( important! )

# ---- Custom dump ----
# Easier to analyze than LAMMP's log file

variable        engtot equal etotal
variable        utotal equal pe
variable        cellx equal lx
variable        kintemp equal temp
variable        virpress equal press
variable        massdensity equal density
variable 		volume equal vol

fix             thermodata all print 1000 "${volume}" file "dump.volume" screen no

# DCD trajectory (every 0.5 ps)

dump            1 all dcd 5000 traj.dcd

# ----- Temperature/Pressure Controls -----
fix 1 all npt temp ${T} ${T} 100 iso ${P} ${P} 1000

run 40000  # production 5 ns

write_data data.final
